*Heading
** Job name: phd-bolt Model name: Model-1
** Generated by: Abaqus/CAE 6.10-1
*Preprint, echo=NO, model=NO, history=NO, contact=NO
**
** PARTS
**
*Part, name=bolt
*Node
      1,   29.7202892,  -19.2751083,   4.06400013
      2,   29.7202892,  -17.0175724,   4.06400013
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*Element, type=C3D8R
   1,  775,    2,   62,  702, 3394,  237, 1590, 3321
   2,   62,   63,  701,  702, 1590, 1589, 3320, 3321
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*End Part
**
**
** ASSEMBLY
**
*Assembly, name=Assembly
**
*Instance, name=bolt-1, part=bolt
*End Instance
**
*End Assembly
**
** MATERIALS
**
*Material, name=Material-1
*Elastic
 0.7, 0.7
