*Heading
** Job name: phd-holder-shorter Model name: Model-1
** Generated by: Abaqus/CAE 6.10-1
*Preprint, echo=NO, model=NO, history=NO, contact=NO
**
** PARTS
**
*Part, name=holder(shorter)
*Node
      1,  -5.27811003,  -7.20201826,  -18.7450008
      2,  -8.35581303,  -7.20201826,  -18.7450008
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*Element, type=C3D8R
  1,   41,   42,  763,  766,  871,  872, 5419, 5422
  2,   40,   41,  766,  737,  870,  871, 5422, 5393
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*End Part
**
**
** ASSEMBLY
**
*Assembly, name=Assembly
**
*Instance, name=holder(shorter)-1, part=holder(shorter)
*End Instance
**
*End Assembly
**
** MATERIALS
**
*Material, name=Material-1
*Elastic
 0.7, 0.7
