*Heading
** Job name: phd-holder Model name: Model-1
** Generated by: Abaqus/CAE 6.10-1
*Preprint, echo=NO, model=NO, history=NO, contact=NO
**
** PARTS
**
*Part, name=holder
*Node
      1,  -8.21665382,           0.,  -16.7450008
      2,  -11.6166544,           0.,  -16.7450008
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*Element, type=C3D8R
  1,   34,  494,  493,   33,  648, 4045, 4044,  647
  2,   33,  493,  492,   32,  647, 4044, 4043,  646
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*End Part
**
**
** ASSEMBLY
**
*Assembly, name=Assembly
**
*Instance, name=holder-1, part=holder
*End Instance
**
*End Assembly
**
** MATERIALS
**
*Material, name=Material-1
*Elastic
 0.7, 0.7
