*Heading
** Job name: phd-slot Model name: Model-1
** Generated by: Abaqus/CAE 6.10-1
*Preprint, echo=NO, model=NO, history=NO, contact=NO
**
** PARTS
**
*Part, name=slot
*Node
      1,  0.388908744,  -16.0187912,   13.8415852
      2,           0.,   -16.179884,   13.8415852
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*Element, type=C3D8R
   1,  109,  164,   54,   55,  491,  546,  436,  437
   2,  105,  195,  196,  106,  487,  577,  578,  488
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*End Part
**
**
** ASSEMBLY
**
*Assembly, name=Assembly
**
*Instance, name=slot-1, part=slot
*End Instance
**
*End Assembly
**
** MATERIALS
**
*Material, name=Material-1
*Elastic
 0.7, 0.7
